OpenVSP model (file version 5), 4 components.
Geometry view with OpenVSP parameter names; values to 6 digits, angles in degrees, lengths in the model's unit.
Overall bounding box: X_Min=-0.473883 X_Len=13.5649 Y_Min=-0.594416 Y_Len=10.0444 Z_Min=-0.125 Z_Len=3.88806

Wing "StabH"
  location (X Y Z) 10.36 0 0.96, rotation 0 0 0
  bounding box size 1.35 2.66382 0.396647
  totals: TotalSpan=2.68 TotalProjectedSpan=2.66382 TotalChord=1.025 TotalArea=2.747 TotalAR=2.58315
  root: chord 1.35, twist 0, NACA 4-series Camber=0 CamberLoc=0.2 ThickChord=0.1
  sections:
    n  Span  Root_Chord  Tip_Chord  Area   Sweep  Sweep_Location  Dihedral  Twist  Twist_Location  tip airfoil
    1  2.68  1.35        0.7        2.747  3.8    0               6.3       0      0.25            as above

Wing "StabV"
  location (X Y Z) 8.98 0 1.32, rotation 90 0 0
  bounding box size 4.1137 0.926441 2.44306
  totals: TotalSpan=2.53 TotalProjectedSpan=2.44306 TotalChord=1.9725 TotalArea=4.50465 TotalAR=1.32497
  root: chord 2.71, twist 0, NACA 63-series A=1 IdealCl=1 Invert=1 ThickChord=0.14
  sections:
    n  Span  Root_Chord  Tip_Chord  Area     Sweep  Sweep_Location  Dihedral  Twist  Twist_Location  tip airfoil
    1  0.63  2.71        2          1.48365  49.2   0               0         0      0.25            as above
    2  1.9   2           1.18       3.021    49.2   0               17.4      0      0.25            as above

Wing "Blade"
  location (X Y Z) 0 0.48 0, rotation 0 0 0
  bounding box size 0.906101 8.97 0.25
  totals: TotalSpan=8.97 TotalProjectedSpan=8.97 TotalChord=0.471364 TotalArea=4.11275 TotalAR=19.5638
  root: chord 0.25, twist 0, circle Circle_Diameter=0.25
  sections:
    n   Span  Root_Chord  Tip_Chord  Area     Sweep  Sweep_Location  Dihedral  Twist  Twist_Location  tip airfoil
    1   0.41  0.25        0.13       0.0779   8.3    0               0         0      0.25            circle Circle_Diameter=0.13
    2   0.41  0.13        0.25       0.0779   -8.3   0               0         0      0.25            NACA 4-series Camber=0 CamberLoc=0.2 ThickChord=0.8
    3   0.42  0.25        0.25       0.105    0      0               0         0      0.25            NACA 4-series Camber=0 CamberLoc=0.2 ThickChord=0.5
    4   0.18  0.25        0.47       0.0648   0      0               0         0      0.25            NACA 4-series Camber=0 CamberLoc=0.2 ThickChord=0.12
    5   6.27  0.47        0.47       2.9469   0      0               0         0      0.25            as above
    6   0.14  0.47        0.51       0.0686   -15.3  0               0         0      0.25            as above
    7   0.15  0.51        0.72       0.09225  -48.9  0               0         0      0.25            NACA 4-series Camber=0 CamberLoc=0.2 ThickChord=0.1
    8   0.16  0.72        0.79       0.1208   -7.9   0               0         0      0.25            as above
    9   0.38  0.79        0.76       0.2945   16.6   0               0         0      0.25            as above
    10  0.29  0.76        0.62       0.2001   30.5   0               0         0      0.25            NACA 4-series Camber=0 CamberLoc=0.2 ThickChord=0.12
    11  0.16  0.62        0.18       0.064    70.1   0               0         0      0.25            NACA 4-series Camber=0 CamberLoc=0.2 ThickChord=0.2

Wing "BladeTail"
  location (X Y Z) 0 0 0.26, rotation -90 0 180
  bounding box size 0.473883 0.140058 1.73
  totals: TotalSpan=1.73 TotalProjectedSpan=1.73 TotalChord=0.325 TotalArea=0.58005 TotalAR=5.15973
  root: chord 0.35, twist 0, NACA 4-series Camber=0 CamberLoc=0.2 ThickChord=0.4
  sections:
    n  Span  Root_Chord  Tip_Chord  Area     Sweep  Sweep_Location  Dihedral  Twist  Twist_Location  tip airfoil
    1  0.17  0.35        0.29       0.0544   20.4   0               0         0      0.25            NACA 4-series Camber=0 CamberLoc=0.2 ThickChord=0.3
    2  0.19  0.29        0.34       0.05985  20.4   0               0         0      0.25            NACA 4-series Camber=0 CamberLoc=0.2 ThickChord=0.12
    3  1.37  0.34        0.34       0.4658   0      0               0         0      0.25            as above
