OpenVSP model (file version 4), 4 components.
Geometry view with OpenVSP parameter names; values to 6 digits, angles in degrees, lengths in the model's unit.
Overall bounding box: X_Min=-12.5285 X_Len=30.0385 Y_Min=-20.1763 Y_Len=40.3526 Z_Min=-1.715 Z_Len=10.885

Wing "WingGeom"
  location (X Y Z) -1.24 0 2.03, rotation 0 0 0
  symmetric about XZ
  bounding box size 4.93 40.3526 1.22413
  totals: TotalSpan=40.38 TotalProjectedSpan=40.3526 TotalChord=3.535 TotalArea=162.6 TotalAR=10.0143
  root: chord 4.93, twist 0, NACA 4-series Camber=0 CamberLoc=0.2 ThickChord=0.16
  sections:
    n   Span  Root_Chord  Tip_Chord  Area     Sweep  Sweep_Location  Dihedral  Twist  Twist_Location  tip airfoil
    1   2.15  4.93        4.93       10.5995  0      0               0         0      0.25            as above
    2   2.41  4.93        4.93       11.8813  0      0               0         0      0.25            NACA 4-series Camber=0 CamberLoc=0.2 ThickChord=0.15
    3   1.12  4.93        4.88       5.4936   2.2    0               2.4       0      0.25            as above
    4   3.9   4.88        4.25       17.8035  2.2    0               2.4       0      0.25            as above
    5   1.19  4.25        4.05       4.9385   2.2    0               2.4       0      0.25            as above
    6   3.24  4.05        3.52       12.2634  2.2    0               2.4       0      0.25            as above
    7   5.72  3.52        2.59       17.4746  2.2    0               2.4       0      0.25            as above
    8   0.21  2.59        2.07       0.4893   7.7    0               2.4       0      0.25            as above
    9   0.15  2.07        1.39       0.2595   45     0               2.4       0      0.25            as above
    10  0.1   1.39        0.55       0.097    69.4   0               2.4       0      0.25            as above

Wing "StabH"
  location (X Y Z) 11.39 0 2.1, rotation 0 0 0
  symmetric about XZ
  bounding box size 4.73 15.88 0.6624
  totals: TotalSpan=15.88 TotalProjectedSpan=15.88 TotalChord=2.7 TotalArea=50.2364 TotalAR=5.01975
  root: chord 4.73, twist 0, NACA 4-series Camber=0 CamberLoc=0.2 ThickChord=0.14
  sections:
    n  Span  Root_Chord  Tip_Chord  Area     Sweep  Sweep_Location  Dihedral  Twist  Twist_Location  tip airfoil
    1  0.78  4.73        4.42       3.5685   13.9   0               0         0      0.25            as above
    2  0.39  4.42        4.27       1.69455  13.9   0               0         0      0.25            as above
    3  6.3   4.27        1.8        19.1205  13.9   0               0         0      0.25            as above
    4  0.29  1.8         1.59       0.49155  29.4   0               0         0      0.25            as above
    5  0.13  1.59        1.3        0.18785  56.7   0               0         0      0.25            as above
    6  0.05  1.3         0.91       0.05525  72.4   0               0         0      0.25            as above

Wing "StabV"
  location (X Y Z) 5.28 0 2.28, rotation 90 0 0
  bounding box size 11.23 0.898739 6.89
  totals: TotalSpan=6.89 TotalProjectedSpan=6.89 TotalChord=4.22714 TotalArea=30.6372 TotalAR=1.54949
  root: chord 11.23, twist 0, NACA 4-series Camber=0 CamberLoc=0.2 ThickChord=0.08
  sections:
    n  Span  Root_Chord  Tip_Chord  Area     Sweep  Sweep_Location  Dihedral  Twist  Twist_Location  tip airfoil
    1  1     11.23       6.07       8.65     78.7   0               0         0      0.25            NACA 4-series Camber=0 CamberLoc=0.2 ThickChord=0.14
    2  0.27  6.07        5.65       1.5822   54.3   0               0         0      0.25            as above
    3  0.24  5.65        5.45       1.332    34.6   0               0         0      0.25            as above
    4  3.88  5.45        2.75       15.908   28.1   0               0         0      0.25            as above
    5  1     2.75        1.96       2.355    28.1   0               0         0      0.25            as above
    6  0.33  1.96        1.63       0.59235  33.1   0               0         0      0.25            as above
    7  0.17  1.63        0.93       0.2176   63     0               0         0      0.25            as above

Fuselage "FuselageGeom"
  location (X Y Z) -12.49 0 0, rotation 0 0 0
  bounding box size 30.0385 4.31857 3.96
  Design: Length=30
  cross sections:
    n  XLocPercent  YLocPercent  ZLocPercent  shape
    0  0            0            -0.00933333  point
    1  0.004        0            -0.00933333  super ellipse Super_Height=0.86 Super_M=2 Super_MaxWidthLoc=0.34 Super_N=2 Super_Width=0.92
    2  0.034        0            -0.00966667  super ellipse Super_Height=1.66 Super_M=2 Super_MaxWidthLoc=0.34 Super_N=2 Super_Width=1.9
    3  0.112333     0            0.00666667   super ellipse Super_Height=3.78 Super_M=2 Super_MaxWidthLoc=-0.04 Super_N=2 Super_Width=3.74
    4  0.260333     0            0.00866667   super ellipse Super_Height=3.95 Super_M=2 Super_MaxWidthLoc=-0.08 Super_N=2.2 Super_Width=4.3
    5  0.539333     0            0.00866667   as above
    6  0.589333     0            0.01         super ellipse Super_Height=3.89 Super_M=2 Super_MaxWidthLoc=-0.19 Super_N=2.4 Super_Width=4.3
    7  0.75         0            0            ellipse Ellipse_Height=3 Ellipse_Width=2.5
    8  1            0            0            point
