OpenVSP model (file version 5), 4 components.
Geometry view with OpenVSP parameter names; values to 6 digits, angles in degrees, lengths in the model's unit.
Overall bounding box: X_Min=-1.7 X_Len=6.19846 Y_Min=-6.71908 Y_Len=13.4382 Z_Min=-0.703 Z_Len=1.747

Wing "Wing"
  location (X Y Z) 0 0 0, rotation 0 0 0
  symmetric about XZ
  bounding box size 1.29275 13.4382 0.329805
  totals: TotalSpan=13.446 TotalProjectedSpan=13.4382 TotalChord=0.625413 TotalArea=10.2562 TotalAR=17.6073
  root: chord 1.291, twist 0, airfoil file "NN 18-17"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 BaseThickChord=0.1674 ThickChord=0.1674
  sections:
    n   Span   Root_Chord  Tip_Chord  Area       Sweep  Sweep_Location  Dihedral  Twist  Twist_Location  tip airfoil
    1   0.137  1.291       1.291      0.176867   0      0.35            0         0      0.25            as above
    2   0.03   1.291       1.133      0.03636    0      0               0         0      0.25            as above
    3   0.03   1.133       1.069      0.03303    0      0               0         0      0.25            as above
    4   0.03   1.069       1.03       0.031485   0      0               0         0      0.25            as above
    5   0.03   1.03        1.005      0.030525   0      0               0         0      0.25            as above
    6   0.023  1.005       1          0.0230575  0      0               0         0      0.25            as above
    7   2.942  1           0.784      2.62426    0      0.35            2         0      0.25            as above
    8   2.497  0.784       0.6        1.72792    0      0.35            2         0      0.25            as above
    9   0.1    0.6         0.583      0.05915    7.07   0               2         0      0.25            as above
    10  0.1    0.583       0.562      0.05725    9.26   0               2         0      0.25            as above
    11  0.1    0.562       0.534      0.0548     13.17  0               2         0      0.25            as above
    12  0.1    0.534       0.501      0.05175    15.54  0               2         0      0.25            as above
    13  0.08   0.501       0.472      0.03892    17.68  0               2         0      0.25            as above
    14  0.07   0.472       0.443      0.032025   19.73  0               2         0      0.25            as above
    15  0.06   0.443       0.418      0.02583    20.89  0               2         0      0.25            as above
    16  0.05   0.418       0.396      0.02035    21.41  0               2         0      0.25            as above
    17  0.05   0.396       0.372      0.0192     22.78  0               2         0      0.25            as above
    18  0.05   0.372       0.347      0.017975   24.8   0               2         0      0.25            as above
    19  0.05   0.347       0.32       0.016675   26.38  0               2         0      0.25            as above
    20  0.05   0.32        0.291      0.015275   27.83  0               2         0      0.25            as above
    21  0.05   0.291       0.26       0.013775   29.51  0               2         0      0.25            as above
    22  0.05   0.26        0.228      0.0122     30.46  0               2         0      0.25            as above
    23  0.044  0.228       0.2        0.009416   30.96  0               2         0      0.25            as above

Wing "StabH"
  location (X Y Z) 4 0 0.067, rotation 0 -4.5 0
  symmetric about XZ
  bounding box size 0.498484 2.52001 0.0650011
  totals: TotalSpan=2.46 TotalProjectedSpan=2.46 TotalChord=0.5 TotalArea=1.23 TotalAR=4.92
  root: chord 0.5, twist 0, NACA 64-series A=1 IdealCl=0 ThickChord=0.12
  sections:
    n  Span  Root_Chord  Tip_Chord  Area   Sweep  Sweep_Location  Dihedral  Twist  Twist_Location  tip airfoil
    1  1.23  0.5         0.5        0.615  0      0               0         0      0.25            as above

Wing "StabV"
  location (X Y Z) 3.321 0 0.039, rotation 90 0 0
  bounding box size 1.036 0.155447 1.005
  totals: TotalSpan=1.005 TotalProjectedSpan=1.005 TotalChord=0.499786 TotalArea=0.766761 TotalAR=1.31726
  root: chord 1.036, twist 0, airfoil file "FX 71-L-150/30"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 BaseThickChord=0.150036 ThickChord=0.150036
  sections:
    n  Span   Root_Chord  Tip_Chord  Area      Sweep  Sweep_Location  Dihedral  Twist  Twist_Location  tip airfoil
    1  0.858  1.036       0.582      0.694122  19     0               0         0      0.25            as above
    2  0.05   0.582       0.55       0.0283    24.27  0               0         0      0.25            as above
    3  0.03   0.55        0.518      0.01602   41.99  0               0         0      0.25            as above
    4  0.02   0.518       0.482      0.01      57.99  0               0         0      0.25            as above
    5  0.02   0.482       0.428      0.0091    68.47  0               0         0      0.25            as above
    6  0.02   0.428       0.307      0.00735   80.26  0               0         0      0.25            as above
    7  0.007  0.307       0.227      0.001869  84.85  0               0         0      0.25            as above

Fuselage "Fuselage"
  location (X Y Z) -1.7 0 0, rotation 0 0 0
  bounding box size 6.063 0.62 0.9495
  Design: Length=6.063
  cross sections:
    n   XLocPercent  YLocPercent  ZLocPercent  shape
    0   0            0            -0.0663038   point
    1   0.00824674   0            -0.0648194   ellipse Ellipse_Height=0.13 Ellipse_Width=0.128
    2   0.0164935    0            -0.0638298   ellipse Ellipse_Height=0.197 Ellipse_Width=0.193
    3   0.032987     0            -0.0621804   ellipse Ellipse_Height=0.303 Ellipse_Width=0.288
    4   0.0494805    0            -0.060696    ellipse Ellipse_Height=0.393 Ellipse_Width=0.357
    5   0.0824674    0            -0.0570675   ellipse Ellipse_Height=0.54 Ellipse_Width=0.455
    6   0.115454     0            -0.0529441   ellipse Ellipse_Height=0.657 Ellipse_Width=0.52
    7   0.148441     0            -0.0491506   ellipse Ellipse_Height=0.751 Ellipse_Width=0.566
    8   0.181428     0            -0.045522    ellipse Ellipse_Height=0.827 Ellipse_Width=0.596
    9   0.214415     0            -0.0423883   ellipse Ellipse_Height=0.886 Ellipse_Width=0.614
    10  0.247402     0            -0.0400792   ellipse Ellipse_Height=0.92 Ellipse_Width=0.62
    11  0.280389     0            -0.0374402   ellipse Ellipse_Height=0.939 Ellipse_Width=0.612
    12  0.313376     0            -0.0352961   ellipse Ellipse_Height=0.921 Ellipse_Width=0.588
    13  0.346363     0            -0.032822    ellipse Ellipse_Height=0.867 Ellipse_Width=0.546
    14  0.37935      0            -0.0291935   ellipse Ellipse_Height=0.775 Ellipse_Width=0.487
    15  0.412337     0            -0.0235857   ellipse Ellipse_Height=0.657 Ellipse_Width=0.419
    16  0.445324     0            -0.0168234   ellipse Ellipse_Height=0.528 Ellipse_Width=0.355
    17  0.478311     0            -0.00973116  ellipse Ellipse_Height=0.41 Ellipse_Width=0.305
    18  0.511298     0            -0.00362857  ellipse Ellipse_Height=0.317 Ellipse_Width=0.275
    19  0.552532     0            0            ellipse Ellipse_Height=0.26 Ellipse_Width=0.26
    20  0.940129     0            0            ellipse Ellipse_Height=0.18 Ellipse_Width=0.18
    21  0.954973     0            0.000164935  ellipse Ellipse_Height=0.179 Ellipse_Width=0.177
    22  0.969817     0            0.00032987   ellipse Ellipse_Height=0.177 Ellipse_Width=0.156
    23  0.984661     0            0.00032987   ellipse Ellipse_Height=0.175 Ellipse_Width=0.116
    24  1            0            0            point
