OpenVSP model (file version 5), 5 components.
Geometry view with OpenVSP parameter names; values to 6 digits, angles in degrees, lengths in the model's unit.
Overall bounding box: X_Min=-0.32 X_Len=6.61 Y_Min=-0.127092 Y_Len=5.18709 Z_Min=-0.06 Z_Len=2.16

Wing "Mast"
  location (X Y Z) -0.32 0 0.78, rotation 90 0 0
  bounding box size 0.77 0.254184 1.17
  totals: TotalSpan=1.17 TotalProjectedSpan=1.17 TotalChord=0.58 TotalArea=0.6786 TotalAR=2.01724
  root: chord 0.77, twist 0, NACA 4-series Camber=0 CamberLoc=0.2 ThickChord=0.33
  sections:
    n  Span  Root_Chord  Tip_Chord  Area    Sweep  Sweep_Location  Dihedral  Twist  Twist_Location  tip airfoil
    1  1.17  0.77        0.39       0.6786  8.7    0               0         0      0.25            NACA 4-series Camber=0 CamberLoc=0.2 ThickChord=0.44

Wing "StabH"
  location (X Y Z) 5.64 0.07 0.93, rotation 0 0 0
  bounding box size 0.55 1.13 0.0550319
  totals: TotalSpan=1.13 TotalProjectedSpan=1.13 TotalChord=0.415 TotalArea=0.46895 TotalAR=2.72289
  root: chord 0.55, twist 0, NACA 4-series Camber=0 CamberLoc=0.2 ThickChord=0.1
  sections:
    n  Span  Root_Chord  Tip_Chord  Area     Sweep  Sweep_Location  Dihedral  Twist  Twist_Location  tip airfoil
    1  1.13  0.55        0.28       0.46895  4.3    0               0         0      0.25            as above

Wing "StabV"
  location (X Y Z) 6 0.17 0.28, rotation 90 0 0
  bounding box size 0.678714 0.0550319 1.82
  totals: TotalSpan=1.82 TotalProjectedSpan=1.82 TotalChord=0.4025 TotalArea=0.72555 TotalAR=4.56536
  root: chord 0.29, twist 0, NACA 4-series Camber=0 CamberLoc=0.2 ThickChord=0.1
  sections:
    n  Span  Root_Chord  Tip_Chord  Area     Sweep  Sweep_Location  Dihedral  Twist  Twist_Location  tip airfoil
    1  0.71  0.29        0.55       0.2982   -28.7  0               0         0      0.25            as above
    2  1.11  0.55        0.22       0.42735  20.3   0               0         0      0.25            as above

Wing "Blade"
  location (X Y Z) 0 0 0, rotation 0 0 0
  bounding box size 0.3 5.06 0.12
  totals: TotalSpan=5.06 TotalProjectedSpan=5.06 TotalChord=0.2175 TotalArea=1.4535 TotalAR=17.6151
  root: chord 0.12, twist 0, circle Circle_Diameter=0.12
  sections:
    n  Span  Root_Chord  Tip_Chord  Area    Sweep  Sweep_Location  Dihedral  Twist  Twist_Location  tip airfoil
    1  0.19  0.12        0.12       0.0228  0      0               0         0      0.25            as above
    2  0.19  0.12        0.24       0.0342  -22.1  0               0         0      0.25            NACA 4-series Camber=0 CamberLoc=0.2 ThickChord=0.12
    3  0.25  0.24        0.3        0.0675  0      0               0         0      0.25            as above
    4  4.43  0.3         0.3        1.329   0      0               0         0      0.25            as above

Wing "WingGeom"
  location (X Y Z) 0 0.18 0, rotation 0 0 0
  bounding box size 0.14 0.56 0.0168107
  totals: TotalSpan=0.56 TotalProjectedSpan=0.56 TotalChord=0.1225 TotalArea=0.07595 TotalAR=4.12903
  root: chord 0.07, twist 0, NACA 4-series Camber=0 CamberLoc=0.2 ThickChord=0.12
  sections:
    n  Span  Root_Chord  Tip_Chord  Area     Sweep  Sweep_Location  Dihedral  Twist  Twist_Location  tip airfoil
    1  0.07  0.07        0.14       0.00735  0      0               0         0      0.25            as above
    2  0.49  0.14        0.14       0.0686   0      0               0         0      0.25            as above
